folder simulations: version=32
  simulation AgMIP
    memo
             This .apsim file was created by the APSIM AgMIP translator.
             Assumptions made by translator:
                * Soil AirDry values are set to 0.05 of LL15 for all layers
                * Soil/Crop LL values are set to LL15 for all layers
                * Soil/Crop KL values are set to 0.1 for all layers
                * Soil/Crop XF values are set to 1.0 for all layers (i.e. no sub soil contraints)
    clock
      start_date = 01/01/1940  # Enter the start date of the simulation
      end_date = 31/12/1950  # Enter the end date of the simulation
    metfile met: filename=${wst_insi}.met
    summaryfile
    area paddock
      soil: Site=$experiment.soil.site; Longitude=$experiment.soil.longitude
        Comment = $experiment.soil.name  # Comments
        SoilType = $experiment.soil.classification  # Soil description
        Latitude = $experiment.soil.latitude  # Latitude (WGS84)
        DataSource = $experiment.soil.source
        Water
          #foreach ($layer in $experiment.soil.layers)
          Layer: Thickness (mm)=$layer.thickness; BD (g/cc)=$layer.bulkDensity; AirDry (mm/mm)=$layer.airDry; LL15 (mm/mm)=$layer.lowerLimit; DUL (mm/mm)=$layer.drainedUpperLimit; SAT (mm/mm)=$layer.saturation
          #end
          SoilCrop Barley
            #foreach ($layer in $experiment.soil.layers)
            Layer: Thickness (mm)=$layer.thickness; LL (mm/mm)=$layer.lowerLimit; KL (/day)=0.1; XF (0-1)=1
            #end
        SoilWat: SummerCona=3.5; SummerU=6; SummerDate=1-Nov; WinterCona=3.5; WinterU=6; WinterDate=1-Apr; DiffusConst=40; DiffusSlope=16; Salb=0.13; Cn2Bare=73; CnRed=20; CnCov=0.8
          #foreach ($layer in $experiment.soil.layers)
          Layer: Thickness (mm)=$layer.thickness; SWCON (0-1)=0.3
          #end
        SoilOrganicMatter: RootCn=40; RootWt=200; SoilCn=12.5; EnrACoeff=7.4; EnrBCoeff=0.2
          #foreach ($layer in $experiment.soil.layers)
          Layer: Thickness (mm)=$layer.thickness; OC (Total %)=$layer.organicCarbon; FBiom (0-1)=0.025; FInert (0-1)=0.4
          #end
        Analysis
          #foreach ($layer in $experiment.soil.layers)
          Layer: Thickness (mm)=$layer.thickness; PH (1:5 water)=$layer.ph
          #end
        Sample Initial conditions
          Layer:
            Thickness (mm)  NO3 (ppm)  NH4 (ppm)
            150             6.503      0.599004
            150             2.101      0.100001
            300             2.101      0.100001
            300             1.701      0.100001
            300             1.701      0.100001
            300             1.701      0.100001
            300             1.701      0.100001
            300             1.701      0.100001
            300             1.701      0.100001
            300             1.701      0.100001
            300             1.701      0.100001
      surfaceom SurfaceOrganicMatter
        PoolName = wheat  # Organic Matter pool name
        type = wheat  # Organic Matter type
        mass = 1000  # Initial surface residue (kg/ha)
        cnr = 80  # C:N ratio of initial residue
        standing_fraction = 0  # Fraction of residue standing
      fertiliser
      irrigation
        automatic_irrigation = off
        asw_depth = 600  # Depth to which ASW is calculated. (mm)
        crit_fr_asw = 0.5  # Fraction of ASW below which irrigation is applied (0-1.0)
        irrigation_efficiency = 1  # Efficiency of the irrigation. (0-1.0)
        irrigation_allocation = off  # Allocation limits
        allocation = 0  # Allocation in mm
        default_no3_conc = 0.0  # Nitrate concentration (ppm N)
        default_nh4_conc = 0.0  # Ammonium concentration (ppm N)
        default_cl_conc = 0.0  # Chloride concentration (ppm Cl)
      wheat
      folder Manager folder
        operations
        manager Harvesting rule
          # Harvesting criteria
          crop = wheat  # Enter name of crop to harvest when ripe
          on end_of_day:
```
           if [crop].StageName = 'harvest_ripe' or [crop].plant_status = 'dead' then
              [crop]  harvest
              [crop]  end_crop
           endif
```
      outputfile: filename=AgMIP.out; title=AgMIP
        variables
          variables: dd/mm/yyyy as Date, biomass, yield, grain_protein, grain_size, esw
        events Reporting Frequency: event=harvesting
